// COMSOL Multiphysics 5.3.0.223 model "assignment.mph"
// Outline of the model tree

Parameters
  D = 42[mm]  // Diameter of pipe, inlet and out
  L_in = 180[mm]  // Inlet length
  L_out = 110[mm]  // Outlet length
  D_t = 15[mm]  // Throat diameter
  L_t = 40[mm]  // Throat length
  U = 0.011[m/s]  // Inlet velocity
  x0 = 0[mm]
  y0 = 0[mm]
  xt = 220[mm]
  yt = 13.5[mm]
  x1 = 300[mm]
  y1 = 0[mm]

Geometry
  geom1 "Geometry 1" (2D, length unit m)
    r1: Rectangle | pos = {x0, y0}; size = {L_in, D}
    r2: Rectangle | pos = {xt, yt}; size = {L_t, D_t}
    r3: Rectangle | pos = {x1, y1}; size = {L_out, D}
    b1: BezierPolygon "Bézier Polygon 1"
      p = {{0.18, 0.22, 0.22, 0.18}, {0.042, 0.0285, 0.0135, 0}}
      degree = {1, 1, 1}
      w = {1, 1, 1, 1, 1, 1}
    b2: BezierPolygon "Bézier Polygon 2"
      p = {{0.3, 0.26, 0.26, 0.3}, {0.042, 0.0285, 0.0135, 0}}
      degree = {1, 1, 1}
      w = {1, 1, 1, 1, 1, 1}
    uni1: Union | input = b1, b2, r1, r2, r3; intbnd = off; edge = all
    fin: Finalize "Form Union"

Materials
  mat1: Common "Water" on all domains
    def "Basic"
      dynamicviscosity = eta(T[1/K])[Pa*s]
      ratioofspecificheat = 1.0
      electricconductivity = 5.5e-6[S/m]
      heatcapacity = Cp(T[1/K])[J/(kg*K)]
      density = rho(T[1/K])[kg/m^3]
      thermalconductivity = k(T[1/K])[W/(m*K)]
      soundspeed = cs(T[1/K])[m/s]
      eta: Piecewise
        arg = T
        pieces = 
          {273.15, 413.15, 1.3799566804-0.021224019151*T^1+1.3604562827E-4*T^2-4.6454090319E-7*T^3+8.9042735735E-10*T^4-9.0790692686E-13*T^5+3.8457331488E-16*T^6}
          {413.15, 553.75, 0.00401235783-2.10746715E-5*T^1+3.85772275E-8*T^2-2.39730284E-11*T^3}
      Cp: Piecewise | arg = T; pieces = {273.15, 553.75, 12010.1471-80.4072879*T^1+0.309866854*T^2-5.38186884E-4*T^3+3.62536437E-7*T^4}
      rho: Piecewise | arg = T; pieces = {273.15, 553.75, 838.466135+1.40050603*T^1-0.0030112376*T^2+3.71822313E-7*T^3}
      k: Piecewise | arg = T; pieces = {273.15, 553.75, -0.869083936+0.00894880345*T^1-1.58366345E-5*T^2+7.97543259E-9*T^3}
      cs: Interpolation | table = {{273, 1403}, {278, 1427}, {283, 1447}, {293, 1481}, {303, 1507}, {313, 1526}, {323, 1541}, {333, 1552}, {343, 1555}, {353, 1555}, {363, 1550}, {373, 1543}}; interp = piecewisecubic

Physics
  spf: TurbulentFlowkeps "Turbulent Flow, k-ε" on all domains
    dependent variable u = {u, v, w}
    fp1: FluidProperties (default)
    init1: init "Initial Values 1" (default)
    wallbc1: WallBC "Wall 1" (default)
    inl1: InletBoundary "Inlet 1" on boundaries 1 | U0in = U
    out1: OutletBoundary "Outlet 1" on boundaries 12

Mesh
  mesh1 "Mesh 1" (physics-controlled)
    size: MeshSizeDefault | table = cfd

Studies
  std1 "Study 1"
    stat: Stationary

Solver configurations
  sol1 "Solution 1" (study std1)
    v1: Variables "Dependent Variables 1"
    s1: Stationary "Stationary Solver 1"
      se1: Segregated | maxsegiter = 300; segstabacc = segcflcmp; subinitcfl = 3
        ss1: SegregatedStep "Velocity u, Pressure p" | segvar = {comp1_u, comp1_p}; linsolver = d1; subdamp = 0.5
        ss2: SegregatedStep "Turbulence variables"
          segvar = {comp1_k, comp1_ep}
          linsolver = d2
          subdamp = 0.35
          subtermconst = itertol
          subiter = 3
          subntolfact = 1
        ll1: LowerLimit | lowerlimit = comp1.k 0 comp1.ep 0
      d1: Direct | linsolver = pardiso
      d2: Direct | linsolver = pardiso

Datasets
  dset1: Solution | solution = sol1
  edg1: Edge2D "Exterior Walls" on boundaries 2-11 | data = dset1

Plots
  pg1: PlotGroup2D "Velocity (spf)" | data = dset1
    surf1: Surface | expr = spf.U; suffixintitle = UGWOKE KENECHUKWU PERFECTUS 2022/241806
    con1: Contour | expr = spf.U; suffixintitle = UGWOKE KENECHUKWU PERFECTUS 2022/241806
    str1: Streamline on boundaries 1
      expr = {u, v}
      descr = Velocity field
      suffixintitle = UGWOKE KENECHUKWU PERFECTUS 2022/241806
      col1: Color "Color Expression 1" | expr = spf.U
    arws1: ArrowSurface
      expr = {u, v}
      descr = Velocity field
      suffixintitle = UGWOKE KENECHUKWU PERFECTUS 2022/241806
      xnumber = 20
      ynumber = 20
      col1: Color "Color Expression 1" | expr = spf.U
  pg2: PlotGroup2D "Pressure (spf)" | data = dset1
    con1: Contour | expr = p
    surf1: Surface | expr = p; descr = Pressure
  pg3: PlotGroup2D "Wall Resolution (spf)" | data = dset1
    line1: Line "Wall Resolution" | expr = spf.Delta_wPlus; linetype = tube
      hght1: Height "Height Expression" | heightdata = expr; expr = spf.WRHeightExpr